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/batch
! ANSYS input file written by Workbench version 17.2 RELEASE
! File used for geometry attach: C:\Users\szalkiewicz\Desktop\RechteckTest.ipt
/title,unsaved_project--Statisch-mechanisch
/com,--- Data in consistent NMM units. See Solving Units in the help system for more information.
/units,MPA
/prep7
numoff,nodes,1107
numoff,elem,512
numoff,mat,1
numoff,type,1
numoff,real,1
numoff,csys,0
! Turn off shape checking because checks already performed inside WB mesher.
! See help system for more information.
SHPP,OFF,,NOWARN
etcon,set             ! allow ANSYS to choose best KEYOP's for 180x elements
/com,*********** Nodes for the whole assembly ***********
nblock,3
(1i9,3e20.9e3)
        1    5.000000000E+001    1.526556659E-014    4.500000000E+000
        2    5.000000000E+001    1.526556659E-014    5.500000000E+000
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-1
/com,*********** Elements for Body 1 "RechteckTest.ipt" ***********
et,1,200
keyo,1,1,9
eblock,19,solid,,512
(19i9)
        1        1        1        1        0        0        0        0       10        0        1        5      205       96      195      241      706      236      240
     1102      705
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-1
/com,*********** Send User Defined Coordinate System(s) ***********
csys,0
/com,*********** Send Materials ***********
MP,DENS,1,7.85e-09,	! tonne mm^-3
MP,ALPX,1,1.2e-05,	! C^-1
MP,C,1,434000000,	! mm^2 s^-2 C^-1
MP,KXX,1,60.5,	! tonne mm s^-3 C^-1
MP,RSVX,1,0.00017,	! ohm mm
MP,EX,1,200000,	! tonne s^-2 mm^-1
MP,NUXY,1,0.3,
MP,MURX,1,10000,

/eof
